Vin := 120*sqrt(2)*V
Vbe := 0.7 V
β := 20
Vout_max := 80 V
Iout_max := 0.505 A
Vout_min := 10 V
Iout_min := 5 mA
Vmax := 30 V
Imax := 100 mA
Vmin := 5 V
Imin := 2 mA
R1_max(Vout, Iout) := (Vin - Vout + Vbe)/(Imin + Iout/(β + 1))
R1_min(Vout, Iout) := (Vin - Vout + Vbe)/(Imax + Iout/(β + 1))
R2_max(Vout, Iout, R1) := (Vmin - Vout + Vbe)/(Iout/(β + 1) - (Vin - Vout + Vbe)/R1)
R2_min(Vout, Iout, R1) := (Vmax - Vout + Vbe)/(Iout/(β + 1) - (Vin - Vout + Vbe)/R1)
R1_max(Vout_max, Iout_max) = 3470.78 Ω
R1_min(Vout_max, Iout_max) = 728.798 Ω
R1_max(Vout_max, Iout_min) = 40394 Ω
R1_min(Vout_max, Iout_min) = 901.909 Ω
R1_max(Vout_min, Iout_max) = 6158.17 Ω
R1_min(Vout_min, Iout_max) = 1293.1 Ω
R1_max(Vout_min, Iout_min) = 71670.6 Ω
R1_min(Vout_min, Iout_min) = 1600.25 Ω
R1_teorico := (R1_max(Vout_max, Iout_max) + R1_min(Vout_min, Iout_min))/2 = 2535.51 Ω
R1 := R1_teorico
R2_max(Vout_max, Iout_max, R1) = 6400.7 Ω
R2_min(Vout_max, Iout_max, R1) = 4247.03 Ω
R2_max(Vout_max, Iout_min, R1) = 2097.82 Ω
R2_min(Vout_max, Iout_min, R1) = 1391.96 Ω
R2_max(Vout_min, Iout_max, R1) = 109.649 Ω
R2_min(Vout_min, Iout_max, R1) = -527.847 Ω
R2_max(Vout_min, Iout_min, R1) = 68.2264 Ω
R2_min(Vout_min, Iout_min, R1) = -328.439 Ω
