VinAC := 120 V
VinDC := VinAC*sqrt(2) = 169.706 V
VinDC := 12 V
β_max := 120
P_max := 17 W
β_min := 10
Vbe := 0.7 V
Vref := 2.5 V
Vo_max_teorico := 10 V
Io_max := 120 mA
R2_max := 10 kΩ
Ic2_min := 5 mA
R2_min := 0 Ω
R3_teorico := R2_max*Vref/(Vo_max_teorico - Vref) = 3333.33 Ω
R3 := 3.3 kΩ
Vo_max := Vref*(1 + R2_max/R3) = 10.0758 V
Vo_min := Vref*(1 + R2_min/R3) = 2.5 V
Ic_max := P_max/(Vo_max - Vbe) = 1.81319 A
Vo_min/Io_max = 20.8333 Ω
Ie_max := Ic_max*(β_max + 1)/β_max = 1.8283 A
Vo_max/Io_max = 83.9646 Ω
Io_min := Vref/R3 = 0.000757576 A
Iout_max := Io_max + Io_min
Iout_min := Io_min
R1_max(Vout, Iout, β) := (VinDC - Vout + Vbe)*(β + 1)/(Ic2_min*(β + 1) + Vref/R3 + Iout)
R1_min(Vout, Iout, β) := (VinDC - Vout + Vbe)*(β + 1)/(Ic_max*(β + 1) + Vref/R3 + Iout)
R1_max(Vo_max, Iout_max, β_max) = 437.064 Ω
R1_min(Vo_max, Iout_max, β_max) = 1.44651 Ω
R1_max(Vo_max, Iout_max, β_min) = 163.536 Ω
R1_min(Vo_max, Iout_max, β_min) = 1.43855 Ω
R1_max(Vo_max, Iout_min, β_max) = 523.537 Ω
R1_min(Vo_max, Iout_min, β_max) = 1.4473 Ω
R1_max(Vo_max, Iout_min, β_min) = 510.777 Ω
R1_min(Vo_max, Iout_min, β_min) = 1.4472 Ω
R1_max(Vo_min, Iout_max, β_max) = 1698.79 Ω
R1_min(Vo_min, Iout_max, β_max) = 5.62234 Ω
R1_max(Vo_min, Iout_max, β_min) = 635.639 Ω
R1_min(Vo_min, Iout_max, β_min) = 5.59139 Ω
R1_max(Vo_min, Iout_min, β_max) = 2034.9 Ω
R1_min(Vo_min, Iout_min, β_max) = 5.62542 Ω
R1_max(Vo_min, Iout_min, β_min) = 1985.31 Ω
R1_min(Vo_min, Iout_min, β_min) = 5.62503 Ω
R1_teorico := (R1_max(Vo_max, Iout_max, β_max) + R1_min(Vo_min, Iout_min, β_min))/2 = 221.344 Ω
R1 := 6.8 kΩ
